Simple Wing
#Mach
 0.3
#IYsym   IZsym   Zsym
 0       0       0.0
#Sref    Cref    Bref
10.0     1.0     5.0
#Xref    Yref    Zref
0.50     0.0     0.0
#
#
#====================================================================
SURFACE
Wing
#Nchordwise  Cspace   Nspanwise   Sspace
8            1.0       12         1.0
#
YDUPLICATE
0.0
#
ANGLE
1.0
#-------------------------------------------------------------
SECTION
#Xle    Yle    Zle     Chord   Ainc  Nspanwise  Sspace
0.      0.     0.      1.0     0.0   0          0

#-------------------------------------------------------------
SECTION
#Xle    Yle    Zle     Chord   Ainc  Nspanwise  Sspace
0.0     3.0    0.      1.0     0.0   0          0

#Cname   Cgain  Xhinge  HingeVec     SgnDup
CONTROL
aileron  -1.0   0.75    0.0 0.0 0.0  -1.0
#

#-------------------------------------------------------------
SECTION
#Xle    Yle    Zle     Chord   Ainc  Nspanwise  Sspace
0.0     5.0    0.      1.0     0.0   0          0

#Cname   Cgain  Xhinge  HingeVec     SgnDup
CONTROL
aileron  -1.0   0.75    0.0 0.0 0.0  -1.0
#
